# OpenSim document version 40000
Model Bicycle:
  gravity: 0 -9.80665 0
  Ground
  BodySet:
    Body platform: mass=1 [kg] inertia=(1 1 1 0 0 0)
      Brick platform_geom_1: half_lengths=(50 0.05 1)
    Body RearWheel: mass=1 inertia=(1 1 1 0.11 0 0)
      Cylinder RearWheel_geom_1: radius=0.35 half_height=0.0115
    Body rightChainstay: mass=0.25 inertia=(1 1 1 0 0 0)
      Cylinder rightChainstay_geom_1: radius=0.012 half_height=0.205
    Body leftChainstay: mass=0.25 inertia=(1 1 1 0 0 0)
      Cylinder leftChainstay_geom_1: radius=0.012 half_height=0.205
    Body bottomBracket: mass=0.25 inertia=(1 1 1 0 0 0)
      Cylinder bottomBracket_geom_1: radius=0.021 half_height=0.0365
    Body seatTube: mass=0.25 inertia=(1 1 1 0 0 0)
      Cylinder seatTube_geom_1: radius=0.012 half_height=0.2405
    Body downTube: mass=0.25 inertia=(1 1 1 0 0 0)
      Cylinder downTube_geom_1: radius=0.012 half_height=0.29
    Body topTube: mass=0.25 inertia=(1 1 1 0 0 0)
      Cylinder topTube_geom_1: radius=0.012 half_height=0.27
    Body headTube: mass=0.25 inertia=(1 1 1 0 0 0)
      Cylinder headTube_geom_1: radius=0.021 half_height=0.0715
    Body leftSeatstay: mass=0.25 inertia=(1 1 1 0 0 0)
      Cylinder leftSeatstay_geom_1: radius=0.012 half_height=0.225
    Body rightSeatstay: mass=0.25 inertia=(1 1 1 0 0 0)
      Cylinder rightSeatstay_geom_1: radius=0.012 half_height=0.225
    Body steeringTube: mass=0.25 inertia=(1 1 1 0 0 0)
      Cylinder steeringTube_geom_1: radius=0.012 half_height=0.0915
    Body stem: mass=0.25 inertia=(1 1 1 0 0 0)
      Cylinder stem_geom_1: radius=0.012 half_height=0.05
    Body handlebar: mass=0.25 inertia=(1 1 1 0 0 0)
      Cylinder handlebar_geom_1: radius=0.012 half_height=0.21
    Body leftHood: mass=0.1 inertia=(1 1 1 0 0 0)
      Cylinder leftHood_geom_1: radius=0.012 half_height=0.05
    Body rightHood: mass=0.1 inertia=(1 1 1 0 0 0)
      Cylinder rightHood_geom_1: radius=0.012 half_height=0.05
    Body leftDrop: mass=0.1 inertia=(1 1 1 0 0 0)
      Cylinder leftDrop_geom_1: radius=0.012 half_height=0.0375
    Body leftDrop2: mass=0.1 inertia=(1 1 1 0 0 0)
      Cylinder leftDrop2_geom_1: radius=0.012 half_height=0.0375
    Body rightDrop: mass=0.1 inertia=(1 1 1 0 0 0)
      Cylinder rightDrop_geom_1: radius=0.012 half_height=0.0375
    Body rightDrop2: mass=0.1 inertia=(1 1 1 0 0 0)
      Cylinder rightDrop2_geom_1: radius=0.012 half_height=0.0375
    Body leftFork: mass=0.25 inertia=(1 1 1 0 0 0)
      Cylinder leftFork_geom_1: radius=0.012 half_height=0.1815
    Body rightFork: mass=0.25 inertia=(1 1 1 0 0 0)
      Cylinder rightFork_geom_1: radius=0.012 half_height=0.1815
    Body frontWheel: mass=0.8 inertia=(1 1 1 0 0 0)
      Cylinder frontWheel_geom_1: radius=0.35 half_height=0.0115
    Body seatpost: mass=0.25 inertia=(1 1 1 0 0 0)
      Cylinder seatpost_geom_1: radius=0.0096 half_height=0.19
    Body saddle: mass=0.25 inertia=(1 1 1 0 0 0)
      Ellipsoid saddle_geom_1: radii=(0.09 0.01 0.0665)
    Body crankSpindle: mass=0.25 inertia=(1 1 1 0 0 0)
      Cylinder crankSpindle_geom_1: radius=0.012 half_height=0.075
    Body leftCrank: mass=0.25 inertia=(1 1 1 0 0 0)
      Brick leftCrank_geom_1: half_lengths=(0.0875 0.015 0.005)
    Body leftPedal: mass=0.25 inertia=(1 1 1 0 0 0)
      Brick leftPedal_geom_1: half_lengths=(0.03 0.005 0.02)
    Body rightCrank: mass=0.25 inertia=(1 1 1 0 0 0)
      Brick rightCrank_geom_1: half_lengths=(0.0875 0.015 0.005)
    Body rightPedal: mass=0.25 inertia=(1 1 1 0 0 0)
      Brick rightPedal_geom_1: half_lengths=(0.03 0.005 0.02)
  JointSet:
    PinJoint platformToGround: socket_parent_frame=ground_offset socket_child_frame=platform_offset
      Coordinate platform_rz: default_value=-0.1745329 range=(-1.745329 1.745329) locked=true
      PhysicalOffsetFrame ground_offset: socket_parent=/ground translation=(0 -0.05 0) [meters]
      PhysicalOffsetFrame platform_offset: socket_parent=/bodyset/platform translation=(0 0 0)
    FreeJoint rearWheelToPlatform: socket_parent_frame=platform_offset socket_child_frame=RearWheel_offset
      Coordinate rearWheel_rx: default_value=0 locked=true
      Coordinate rearWheel_ry: default_value=0 range=(-3.141593 3.141593)
      Coordinate rearWheel_rz: default_value=0 locked=true
      Coordinate rearWheel_tx: default_value=0 range=(0 50)
      Coordinate rearWheel_ty: default_value=0 locked=true
      Coordinate rearWheel_tz: default_value=-0.35 range=(-5 5)
      PhysicalOffsetFrame platform_offset: socket_parent=/bodyset/platform translation=(0 0.1 0)
          orientation=(1.570796 0 0) [radians]
      PhysicalOffsetFrame RearWheel_offset: socket_parent=/bodyset/RearWheel translation=(0 0 0)
    BallJoint rightChainstayToRearWheel: socket_parent_frame=RearWheel_offset socket_child_frame=rightChainstay_offset
      Coordinate rightChainstay_rx: default_value=0 range=(-3.141593 3.141593)
      Coordinate rightChainstay_ry: default_value=0 locked=true
      Coordinate rightChainstay_rz: default_value=0 locked=true
      PhysicalOffsetFrame RearWheel_offset: socket_parent=/bodyset/RearWheel translation=(0 0.0365 0)
          orientation=(0 0 1.570796)
      PhysicalOffsetFrame rightChainstay_offset: socket_parent=/bodyset/rightChainstay translation=(0 0.205 0)
    BallJoint leftChainstayToRearWheel: socket_parent_frame=RearWheel_offset socket_child_frame=leftChainstay_offset
      Coordinate leftChainstay_rx: default_value=0 range=(-3.141593 3.141593)
      Coordinate leftChainstay_ry: default_value=0 locked=true
      Coordinate leftChainstay_rz: default_value=0 locked=true
      PhysicalOffsetFrame RearWheel_offset: socket_parent=/bodyset/RearWheel translation=(0 -0.0365 0)
          orientation=(0 0 1.570796)
      PhysicalOffsetFrame leftChainstay_offset: socket_parent=/bodyset/leftChainstay translation=(0 0.205 0)
    WeldJoint bottomBracketToRightChainstay: socket_parent_frame=rightChainstay_offset
        socket_child_frame=bottomBracket_offset
      PhysicalOffsetFrame rightChainstay_offset: socket_parent=/bodyset/rightChainstay translation=(0 -0.205 0)
          orientation=(0 0 1.570796)
      PhysicalOffsetFrame bottomBracket_offset: socket_parent=/bodyset/bottomBracket translation=(0 -0.0365 0)
    WeldJoint bottomBracketToLeftChainstay: socket_parent_frame=leftChainstay_offset
        socket_child_frame=bottomBracket_offset
      PhysicalOffsetFrame leftChainstay_offset: socket_parent=/bodyset/leftChainstay translation=(0 -0.205 0)
          orientation=(0 0 1.570796)
      PhysicalOffsetFrame bottomBracket_offset: socket_parent=/bodyset/bottomBracket translation=(0 0.0365 0)
    WeldJoint seatTubeToBottomBracket: socket_parent_frame=bottomBracket_offset socket_child_frame=seatTube_offset
      PhysicalOffsetFrame bottomBracket_offset: socket_parent=/bodyset/bottomBracket translation=(0 0 0)
          orientation=(1.570796 0 0)
      PhysicalOffsetFrame seatTube_offset: socket_parent=/bodyset/seatTube translation=(0 0.2405 0)
          orientation=(0 0 -0.2792527)
    WeldJoint downTubeToBottomBracket: socket_parent_frame=bottomBracket_offset socket_child_frame=downTube_offset
      PhysicalOffsetFrame bottomBracket_offset: socket_parent=/bodyset/bottomBracket translation=(0 0 0)
          orientation=(1.570796 0 0)
      PhysicalOffsetFrame downTube_offset: socket_parent=/bodyset/downTube translation=(0 0.29 0)
          orientation=(0 0 0.85)
    WeldJoint topTubeToSeatTube: socket_parent_frame=seatTube_offset socket_child_frame=topTube_offset
      PhysicalOffsetFrame seatTube_offset: socket_parent=/bodyset/seatTube translation=(0 -0.2405 0)
          orientation=(0 0 -1.850049)
      PhysicalOffsetFrame topTube_offset: socket_parent=/bodyset/topTube translation=(0 0.27 0)
    WeldJoint headTubeToTopTube: socket_parent_frame=topTube_offset socket_child_frame=headTube_offset
      PhysicalOffsetFrame topTube_offset: socket_parent=/bodyset/topTube translation=(0 -0.27 0)
          orientation=(0 0 -1.27409)
      PhysicalOffsetFrame headTube_offset: socket_parent=/bodyset/headTube translation=(0 0.0715 0)
    WeldJoint leftSeatStayToChainStay: socket_parent_frame=leftChainstay_offset socket_child_frame=leftSeatstay_offset
      PhysicalOffsetFrame leftChainstay_offset: socket_parent=/bodyset/leftChainstay translation=(0 0.205 0)
          orientation=(1.570796 0 0)
      PhysicalOffsetFrame leftSeatstay_offset: socket_parent=/bodyset/leftSeatstay translation=(0 0.225 0)
          orientation=(0.7853982 0 0)
    WeldJoint rightSeatStayToChainStay: socket_parent_frame=rightChainstay_offset
        socket_child_frame=rightSeatstay_offset
      PhysicalOffsetFrame rightChainstay_offset: socket_parent=/bodyset/rightChainstay translation=(0 0.205 0)
          orientation=(1.570796 0 0)
      PhysicalOffsetFrame rightSeatstay_offset: socket_parent=/bodyset/rightSeatstay translation=(0 0.225 0)
          orientation=(0.7853982 0 0)
    BallJoint steeringTubeToHeadTube: socket_parent_frame=headTube_offset socket_child_frame=steeringTube_offset
      Coordinate steeringTube_rx: default_value=0 locked=true
      Coordinate steeringTube_ry: default_value=0 range=(-1.047198 1.047198)
      Coordinate steeringTube_rz: default_value=0 locked=true
      PhysicalOffsetFrame headTube_offset: socket_parent=/bodyset/headTube translation=(0 0 0)
      PhysicalOffsetFrame steeringTube_offset: socket_parent=/bodyset/steeringTube translation=(0 0 0)
    WeldJoint stemToSteeringTube: socket_parent_frame=steeringTube_offset socket_child_frame=stem_offset
      PhysicalOffsetFrame steeringTube_offset: socket_parent=/bodyset/steeringTube translation=(0 0.0915 0)
          orientation=(0 0 1.37881)
      PhysicalOffsetFrame stem_offset: socket_parent=/bodyset/stem translation=(0 0.05 0)
    WeldJoint handlebarToStem: socket_parent_frame=stem_offset socket_child_frame=handlebar_offset
      PhysicalOffsetFrame stem_offset: socket_parent=/bodyset/stem translation=(0 -0.05 0) orientation=(1.570796 0 0)
      PhysicalOffsetFrame handlebar_offset: socket_parent=/bodyset/handlebar translation=(0 0 0)
    WeldJoint leftHoodToHandlebar: socket_parent_frame=handlebar_offset socket_child_frame=leftHood_offset
      PhysicalOffsetFrame handlebar_offset: socket_parent=/bodyset/handlebar translation=(0 -0.21 0)
          orientation=(1.570796 0 0)
      PhysicalOffsetFrame leftHood_offset: socket_parent=/bodyset/leftHood translation=(0 -0.05 0)
          orientation=(0 0 -0.1047198)
    WeldJoint rightHoodToHandlebar: socket_parent_frame=handlebar_offset socket_child_frame=rightHood_offset
      PhysicalOffsetFrame handlebar_offset: socket_parent=/bodyset/handlebar translation=(0 0.21 0)
          orientation=(1.570796 0 0)
      PhysicalOffsetFrame rightHood_offset: socket_parent=/bodyset/rightHood translation=(0 -0.05 0)
          orientation=(0 0 -0.1047198)
    WeldJoint leftDropToLeftHood: socket_parent_frame=leftHood_offset socket_child_frame=leftDrop_offset
      PhysicalOffsetFrame leftHood_offset: socket_parent=/bodyset/leftHood translation=(0 0 0)
          orientation=(0 0 1.570796)
      PhysicalOffsetFrame leftDrop_offset: socket_parent=/bodyset/leftDrop translation=(0 -0.0375 0)
    WeldJoint leftDrop2ToLeftDrop: socket_parent_frame=leftDrop_offset socket_child_frame=leftDrop2_offset
      PhysicalOffsetFrame leftDrop_offset: socket_parent=/bodyset/leftDrop translation=(0 0.0375 0)
          orientation=(0 0 1.047198)
      PhysicalOffsetFrame leftDrop2_offset: socket_parent=/bodyset/leftDrop2 translation=(0 -0.0375 0)
    WeldJoint rightDropToRightHood: socket_parent_frame=rightHood_offset socket_child_frame=rightDrop_offset
      PhysicalOffsetFrame rightHood_offset: socket_parent=/bodyset/rightHood translation=(0 0 0)
          orientation=(0 0 1.570796)
      PhysicalOffsetFrame rightDrop_offset: socket_parent=/bodyset/rightDrop translation=(0 -0.0375 0)
    WeldJoint rightDrop2ToRightDrop: socket_parent_frame=rightDrop_offset socket_child_frame=rightDrop2_offset
      PhysicalOffsetFrame rightDrop_offset: socket_parent=/bodyset/rightDrop translation=(0 0.0375 0)
          orientation=(0 0 1.047198)
      PhysicalOffsetFrame rightDrop2_offset: socket_parent=/bodyset/rightDrop2 translation=(0 -0.0375 0)
    WeldJoint leftForkToSteeringTube: socket_parent_frame=steeringTube_offset socket_child_frame=leftFork_offset
      PhysicalOffsetFrame steeringTube_offset: socket_parent=/bodyset/steeringTube translation=(0 -0.0915 0.0365)
      PhysicalOffsetFrame leftFork_offset: socket_parent=/bodyset/leftFork translation=(0 0.1815 0)
    WeldJoint rightForkToSteeringTube: socket_parent_frame=steeringTube_offset socket_child_frame=rightFork_offset
      PhysicalOffsetFrame steeringTube_offset: socket_parent=/bodyset/steeringTube translation=(0 -0.0915 -0.0365)
      PhysicalOffsetFrame rightFork_offset: socket_parent=/bodyset/rightFork translation=(0 0.1815 0)
    BallJoint frontWheelToLeftFork: socket_parent_frame=leftFork_offset socket_child_frame=frontWheel_offset
      Coordinate frontWheel_rx: default_value=0 locked=true
      Coordinate frontWheel_ry: default_value=0 range=(-3.141593 3.141593)
      Coordinate frontWheel_rz: default_value=0 locked=true
      PhysicalOffsetFrame leftFork_offset: socket_parent=/bodyset/leftFork translation=(0 -0.1815 -0.0365)
          orientation=(-1.570796 0 0)
      PhysicalOffsetFrame frontWheel_offset: socket_parent=/bodyset/frontWheel translation=(0 0 0)
    SliderJoint seatpostToSeatTube: socket_parent_frame=seatTube_offset socket_child_frame=seatpost_offset
      Coordinate seatpost_tx: default_value=0 range=(-0.38 0.38) locked=true
      PhysicalOffsetFrame seatTube_offset: socket_parent=/bodyset/seatTube translation=(0 -0.2405 0)
          orientation=(0 0 1.570796)
      PhysicalOffsetFrame seatpost_offset: socket_parent=/bodyset/seatpost translation=(0 0 0)
          orientation=(0 0 1.570796)
    PlanarJoint saddleToSeatpost: socket_parent_frame=seatpost_offset socket_child_frame=saddle_offset
      Coordinate saddle_rz: default_value=0 range=(-3.141593 3.141593) locked=true
      Coordinate saddle_tx: default_value=0 range=(-0.38 0.38) locked=true
      Coordinate saddle_ty: default_value=0 locked=true
      PhysicalOffsetFrame seatpost_offset: socket_parent=/bodyset/seatpost translation=(0 -0.19 0)
          orientation=(-3.141593 1.224647e-16 -2.86234)
      PhysicalOffsetFrame saddle_offset: socket_parent=/bodyset/saddle translation=(0 0 0)
    BallJoint crankSpindleToBottomBracket: socket_parent_frame=bottomBracket_offset
        socket_child_frame=crankSpindle_offset
      Coordinate crankSpindle_rx: default_value=0 locked=true
      Coordinate crankSpindle_ry: default_value=0 range=(-3.141593 3.141593)
      Coordinate crankSpindle_rz: default_value=0 locked=true
      PhysicalOffsetFrame bottomBracket_offset: socket_parent=/bodyset/bottomBracket translation=(0 0 0)
      PhysicalOffsetFrame crankSpindle_offset: socket_parent=/bodyset/crankSpindle translation=(0 0 0)
    WeldJoint leftCrankToSpindle: socket_parent_frame=crankSpindle_offset socket_child_frame=leftCrank_offset
      PhysicalOffsetFrame crankSpindle_offset: socket_parent=/bodyset/crankSpindle translation=(0 0.075 0)
          orientation=(1.570796 0 0)
      PhysicalOffsetFrame leftCrank_offset: socket_parent=/bodyset/leftCrank translation=(-0.0875 0 0)
    PinJoint leftPedalToLeftCrank: socket_parent_frame=leftCrank_offset socket_child_frame=leftPedal_offset
      Coordinate leftPedal_rz: default_value=0 range=(-3.141593 3.141593)
      PhysicalOffsetFrame leftCrank_offset: socket_parent=/bodyset/leftCrank translation=(0.0875 0 -0.005)
      PhysicalOffsetFrame leftPedal_offset: socket_parent=/bodyset/leftPedal translation=(0 0 0.02)
    WeldJoint rightCrankToSpindle: socket_parent_frame=crankSpindle_offset socket_child_frame=rightCrank_offset
      PhysicalOffsetFrame crankSpindle_offset: socket_parent=/bodyset/crankSpindle translation=(0 -0.075 0)
          orientation=(1.570796 0 0)
      PhysicalOffsetFrame rightCrank_offset: socket_parent=/bodyset/rightCrank translation=(0.0875 0 0)
    PinJoint rightPedalToRightCrank: socket_parent_frame=rightCrank_offset socket_child_frame=rightPedal_offset
      Coordinate rightPedal_rz: default_value=0 range=(-3.141593 3.141593)
      PhysicalOffsetFrame rightCrank_offset: socket_parent=/bodyset/rightCrank translation=(-0.0875 0 0.005)
      PhysicalOffsetFrame rightPedal_offset: socket_parent=/bodyset/rightPedal translation=(0 0 -0.02)
  ForceSet:
    HuntCrossleyForce rearWheelForce: transition_velocity=0.001
      ContactParametersSet contact_parameters:
        ContactParameters: geometry=(rearWheelContact platformContact) stiffness=1000000 dissipation=2
            static_friction=0.75 dynamic_friction=0.0033 viscous_friction=0.47
    HuntCrossleyForce frontWheelForce: transition_velocity=0.001
      ContactParametersSet contact_parameters:
        ContactParameters: geometry=(frontWheelContact platformContact) stiffness=1000000 dissipation=2
            static_friction=0.75 dynamic_friction=0.0033 viscous_friction=0.47
  ContactGeometrySet:
    ContactHalfSpace platformContact: socket_frame=/bodyset/platform location=(0 0.05 0) orientation=(0 0 -1.570796)
    ContactSphere rearWheelContact: socket_frame=/bodyset/RearWheel location=(0 0 0) radius=0.35
    ContactSphere frontWheelContact: socket_frame=/bodyset/frontWheel location=(0 0 0) radius=0.35
